// COMSOL Multiphysics 6.4.0.293 model "cathodic_protection_2d.mph"
// 2D Cathodic Protection: Graphite and Aluminum in Water
// Top-view engineering approximation. A 10 mA graphite terminal and grounded 100 mm square aluminum plate are separated by 300 mm in a 560 mm diameter water region. The surrounding air uses a tiny artificial conductivity only to visualize a continuous potential extension; it is not interpreted as DC leakage.
// Outline of the model tree

Parameters
  water_diam = 0.56[m]  // Water region diameter
  water_rad = water_diam/2  // Water region radius
  air_rad = 5.0[m]  // Outer radius of plotted air region
  spacing = 0.30[m]  // Electrode center spacing
  graphite_diam = 0.010[m]  // Assumed graphite rod diameter
  al_size = 0.10[m]  // Aluminum plate width in top view
  depth = 0.10[m]  // Equivalent out-of-plane immersed depth
  I_total = 10[mA]  // Applied graphite terminal current
  I_2d = I_total/depth*1[m]  // 2D terminal current scaled to unit thickness
  sigma_water = 0.005[S/m]  // 50 uS/cm water conductivity
  sigma_air = 1e-12[S/m]  // Artificial air conductivity for potential extension
  x_g = -spacing/2  // Graphite center x coordinate
  x_al = spacing/2  // Aluminum center x coordinate

Selections
  selGraphite: Box "Graphite electrode boundary"
    entitydim = 1
    xmin = x_g-0.006[m]
    xmax = x_g+0.006[m]
    ymin = -0.006[m]
    ymax = 0.006[m]
    condition = inside
  selAluminum: Box "Aluminum electrode boundary"
    entitydim = 1
    xmin = x_al-al_size/2-0.001[m]
    xmax = x_al+al_size/2+0.001[m]
    ymin = -al_size/2-0.001[m]
    ymax = al_size/2+0.001[m]
    condition = inside
  selWaterDomain: Disk "Water domains for current plot" | entitydim = 2; r = water_rad-1e-4[m]; condition = somevertex

Geometry
  geom1 "几何 1" (2D, length unit m)
    outer: Circle "圆" | r = air_rad
    water: Circle "圆 2" | r = water_rad
    graphite: Circle "圆 3" | r = graphite_diam/2; pos = {x_g, 0}
    aluminum: Rectangle "矩形" | size = {al_size, al_size}; base = center; pos = {x_al, 0}
    uni1: Union "并集 1" | input = outer, water, graphite, aluminum
    fin: Finalize "形成联合体"

Materials
  mat1: Common "Water and air effective conductivity" on all domains
    def: def "基本"
      electricconductivity = if(x^2+y^2<water_rad^2,sigma_water,sigma_air)
      relpermittivity = if(x^2+y^2<water_rad^2,80,1)

Physics
  ec: ConductiveMedia "电流" on all domains
    dependent variable V
    cucns1: CurrentConservationSolid "固体中的电流守恒 1" (default)
    ein1: ElectricInsulation "电绝缘 1" (default)
    init1: init "初始值 1" (default)
    term1: Terminal "10 mA graphite terminal" on selection selGraphite | I0 = I_2d
    gnd1: Ground "Aluminum reference electrode" on selection selAluminum

Mesh
  mesh1 "网格 1" (physics-controlled)
    size: MeshSizeDefault "大小" | hauto = 3

Studies
  std1 "Stationary 10 mA discharge"
    stat: Stationary "稳态"

Solver configurations
  sol1 "解 1" (study std1)
    v1: Variables "因变量 1"
    s1: Stationary "稳态求解器 1"
      dDef: Direct "直接"
      fc1: FullyCoupled "全耦合 1"

Datasets
  dset1: Solution | solution = sol1
  cln1: CutLine2D "Electrode centerline" | data = dset1; genpoints = {{-5, 0}, {5, 0}}

Derived values
  gev1: EvalGlobal "全局计算 1"
    data = dset1
    table = tbl1
    expr = {ec.term1.V0_ode, ec.R11*1[m]/depth}
    descr = {Graphite terminal voltage, Equivalent resistance at total current}

Plots
  pg1: PlotGroup2D "Electric potential: water and air extension" | data = dset1
    surf1: Surface "表面 1" | expr = V; unit = V
  pg2: PlotGroup2D "Current density magnitude" | data = dset1
    surf1: Surface "表面 1" | expr = max(ec.normJ,1e-12[A/m^2]); unit = A/m^2
  pg3: PlotGroup1D "Centerline electric potential" | data = cln1
    lngr1: LineGraph "线结果图 1" | expr = V; unit = V
  pg4: PlotGroup2D "Electric field magnitude in 5 m radius region" | data = dset1
    surf1: Surface "表面 1" | expr = max(ec.normE,1e-12[V/m]); unit = V/m

Exports
  data1: Data "数据 1"
    data = cln1
    expr = {V, ec.normE, ec.normJ}
    filename = C:\Users\17584\Documents\ALearning\Project\tools\DataProcess\results\comsol\centerline_potential.csv
  img1: Image "图像 1"
    source = /Results/ResultFeatureList/pg1
    width = 1200
    height = 900
    pngfilename = C:\Users\17584\Documents\ALearning\Project\tools\DataProcess\results\comsol\potential_water_air.png
  img2: Image "图像 2"
    source = /Results/ResultFeatureList/pg2
    width = 1200
    height = 900
    pngfilename = C:\Users\17584\Documents\ALearning\Project\tools\DataProcess\results\comsol\current_density.png
  img3: Image "图像 3"
    source = /Results/ResultFeatureList/pg4
    width = 1200
    height = 900
    pngfilename = C:\Users\17584\Documents\ALearning\Project\tools\DataProcess\results\comsol\electric_field_air_radius_5m.png