// COMSOL Multiphysics 6.4.0.293 model "water_system_3d_vfd_spectrum_v5.mph"
// 3D Water Circulation System - VFD Spectrum V5
// V3 geometry and electric-current model with a parameterized VFD source: balanced 30/50 Hz fundamental output plus common-mode PWM carrier components at 4, 8, and 12 kHz. Carrier frequency and common-mode amplitudes are assumptions pending measurement.
// Outline of the model tree
// Components: comp1 "组件 1", comp2 "Reduced electric-field model"

Parameters
  tank_diam = 0.56[m]  // PE tank outer diameter
  tank_total_h = 0.87[m]  // Tank total height excluding lid
  tank_straight_h = 0.72[m]  // Tank straight wall height
  tank_wall = 5[mm]  // Assumed PE wall thickness
  water_volume = 170[L]  // Baseline water volume; later sweep 160-180 L
  sigma_water = 0.05[S/m]  // Confirmed 500 uS/cm water conductivity
  pipe_nominal = DN40  // Nominal hose and flange size
  lower_hose_len = 0.50[m]  // Straight lower suction hose length
  upper_hose_len = 2.0[m]  // Approximate curved upper return hose length
  flow_rate = 6.3[m^3/h]  // Rated pump flow
  pump_head = 32[m]  // Rated pump head
  pump_power = 2.2[kW]  // Motor rated power
  pump_speed = 2800[rpm]  // Motor rated speed
  vfd_power = 3.7[kW]  // VFD rated power
  obs_z = 1[m]  // Observation height above floor
  air_radius = 5[m]  // Requested radial observation domain
  air_height = 3[m]  // Assumed air height above the floor
  floor_thickness = 0.5[m]  // Equivalent thick laboratory floor
  epsr_concrete = 5  // Dry reinforced-concrete effective permittivity
  sigma_concrete = 1e-5[S/m]  // Dry concrete effective conductivity
  V_ll = 380[V]  // Three-phase line-to-line RMS voltage
  V_phase = V_ll/sqrt(3)  // Phase-to-neutral RMS voltage
  f_base = 50[Hz]  // Rated VFD base frequency
  V_motor = V_phase*min(freq/f_base,1)  // Assumed constant V/f motor voltage
  wall_active = if(freq>40[Hz],1,0)  // Wall supply exists only in 50 Hz solution
  K_MEMS = 1[V/(V/m)]  // Placeholder MEMS field-to-voltage coefficient
  V_MEMS_bias = 0[V]  // Placeholder MEMS channel bias
  sensor_nx = 0  // MEMS sensitive-axis x component
  sensor_ny = 1  // MEMS sensitive-axis y component
  sensor_nz = 0  // MEMS sensitive-axis z component
  f_sw = 4[kHz]  // Assumed VFD carrier frequency
  V_dc = 1.35*V_ll  // Approximate rectified DC-link voltage
  V_cm_pwm = 100[V]  // Assumed RMS common-mode carrier component
  pwm_h2 = 0.5  // Assumed second carrier-harmonic ratio
  pwm_h3 = 0.25  // Assumed third carrier-harmonic ratio
  V_cm_spectrum = if(abs(freq-f_sw)<1[Hz],V_cm_pwm,if(abs(freq-2*f_sw)<1[Hz],pwm_h2*V_cm_pwm,if(abs(freq-3*f_sw)<1[Hz],pwm_h3*V_cm_pwm,0[V])))  // Common-mode RMS voltage selected by frequency

Variables
  varMems "Parameterized MEMS response" [comp2]
    E_sensor = ec.Ex*sensor_nx+ec.Ey*sensor_ny+ec.Ez*sensor_nz
    V_MEMS = K_MEMS*E_sensor+V_MEMS_bias

Pairs
  ap1: Identity "一致边界对 1" | source: boundaries 4; destination: boundaries 9
  ap2: Identity "一致边界对 2" | source: boundaries 4; destination: boundaries 100
  ap3: Identity "一致边界对 3" | source: boundaries 11-13, 15, 16; destination: boundaries 18-20, 22, 23
  ap4: Identity "一致边界对 4" | source: boundaries 77; destination: boundaries 86
  ap5: Identity "一致边界对 5" | source: boundaries 110; destination: boundaries 91
  ap6: Identity "一致边界对 6" | source: boundaries 124; destination: boundaries 131
  ap7: Identity "一致边界对 7" | source: boundaries 145; destination: boundaries 146

Geometry
  geom1 "几何 1" [comp1] (3D, length unit m)
    floor: Block "Concrete floor reference" | size = {3.6, 5.2, 0.05}; pos = {-0.65, -4.35, -0.05}
    tankOuter: Cylinder "PE tank outer body" | r = tank_diam/2; h = tank_total_h
    tankCavityTool: Cylinder | r = tank_diam/2-tank_wall; h = tank_total_h-tank_wall; pos = {0, 0, tank_wall}
    tankShell: Difference "PE hollow tank shell" | input = tankOuter; input2 = tankCavityTool
    water: Cylinder "Water - baseline 170 L"
      r = tank_diam/2-tank_wall
      h = water_volume/(pi*(tank_diam/2-tank_wall)^2)
      pos = {0, 0, tank_wall}
    lowerAdapter: Cylinder "Lower tank DN40 adapter"
      r = 0.032
      h = 0.085
      pos = {0.275, 0, 0.1}
      axis = {0.085, 0, 0}
      axistype = cartesian
    lowerTankFlange: Cylinder | r = 0.07; h = 0.03; pos = {0.34, 0, 0.1}; axis = {0.03, 0, 0}; axistype = cartesian
    lowerHose: Cylinder "Lower 0.5 m steel-wire rubber hose"
      r = 0.033
      h = 0.5
      pos = {0.37, 0, 0.1}
      axis = {0.5, 0, 0}
      axistype = cartesian
    pumpBase: Block "Pump wooden base" | size = {0.48, 0.38, 0.08}; pos = {0.78, -0.19, 0}
    pumpBody: Cylinder "Pump hydraulic body"
      r = 0.12
      h = 0.3
      pos = {0.87, 0, 0.14}
      axis = {0.3, 0, 0}
      axistype = cartesian
    pumpLeftFlange: Cylinder "Pump left suction flange"
      r = 0.075
      h = 0.04
      pos = {0.85, 0, 0.14}
      axis = {0.04, 0, 0}
      axistype = cartesian
    pumpRightFlange: Cylinder "Pump right discharge flange"
      r = 0.075
      h = 0.04
      pos = {1.15, 0, 0.14}
      axis = {0.04, 0, 0}
      axistype = cartesian
    motorLower: Cylinder "Vertical motor lower housing"
      r = 0.12
      h = 0.15
      pos = {1.02, 0, 0.14}
      axis = {0, 0, 0.15}
      axistype = cartesian
    motor: Cylinder "2.2 kW vertical motor"
      r = 0.095
      h = 0.3075
      pos = {1.02, 0, 0.27}
      axis = {0, 0, 0.3075}
      axistype = cartesian
    motorCap: Cylinder "Motor fan cover"
      r = 0.1
      h = 0.05
      pos = {1.02, 0, 0.5775}
      axis = {0, 0, 0.05}
      axistype = cartesian
    topAdapter: Cylinder "Top tank threaded adapter"
      r = 0.028
      h = 0.11
      pos = {0.187, 0, 0.87}
      axis = {0, 0, 0.11}
      axistype = cartesian
    topTankFlange: Cylinder "Top DN40 flange"
      r = 0.068
      h = 0.03
      pos = {0.187, 0, 0.96}
      axis = {0, 0, 0.03}
      axistype = cartesian
    upperHose1: Cylinder "Upper return hose segment 1"
      r = 0.033
      h = 0.11
      pos = {1.19, 0, 0.14}
      axis = {0.11, 0, 0}
      axistype = cartesian
    upperHose2: Cylinder "Upper return hose segment 2"
      r = 0.033
      h = 0.81
      pos = {1.3, 0, 0.14}
      axis = {0, 0, 0.81}
      axistype = cartesian
    upperHose3: Cylinder "Upper return hose segment 3"
      r = 0.033
      h = 0.924391691871
      pos = {1.3, 0, 0.95}
      axis = {-0.92, 0, 0.09}
      axistype = cartesian
    upperHose4: Cylinder "Upper return hose segment 4"
      r = 0.033
      h = 0.199371512509
      pos = {0.38, 0, 1.04}
      axis = {-0.193, 0, -0.05}
      axistype = cartesian
    upperElbow1: Sphere "Upper hose smooth bend 1" | r = 0.034; pos = {1.3, 0, 0.14}
    upperElbow2: Sphere "Upper hose smooth bend 2" | r = 0.034; pos = {1.3, 0, 0.95}
    upperElbow3: Sphere "Upper hose smooth bend 3" | r = 0.034; pos = {0.38, 0, 1.04}
    vfd: Block "3.7 kW variable-frequency drive" | size = {0.34, 0.2, 0.55}; pos = {2.34, -0.1, 0.52}
    wallSupply: Block "Wall 3-phase 380 V supply box" | size = {0.22, 0.16, 0.3}; pos = {2.72, -0.08, 0.72}
    supplyCable: Cylinder "Wall supply to VFD cable bundle"
      r = 0.018
      h = 0.107703296143
      pos = {2.72, 0, 0.82}
      axis = {-0.04, 0, -0.1}
      axistype = cartesian
    motorCable1: Cylinder "VFD-to-pump motor cable 1"
      r = 0.014
      h = 0.423792402008
      pos = {2.34, 0, 0.58}
      axis = {-0.14, 0, -0.4}
      axistype = cartesian
    motorCable2: Cylinder "VFD-to-pump motor cable 2"
      r = 0.014
      h = 0.88
      pos = {2.2, 0, 0.18}
      axis = {-0.88, 0, 0}
      axistype = cartesian
    motorCable3: Cylinder "VFD-to-pump motor cable 3"
      r = 0.014
      h = 0.325576411922
      pos = {1.32, 0, 0.18}
      axis = {-0.22, 0, 0.24}
      axistype = cartesian
    obs2: Sphere "Observation point 2 m" | r = 0.035; pos = {0, -2, 1}
    obs3: Sphere "Observation point 3 m" | r = 0.035; pos = {0, -3, 1}
    obs4: Sphere "Observation point 4 m" | r = 0.035; pos = {0, -4, 1}
    fin: Finalize "形成装配" | action = assembly
  geom2 "几何 2" [comp2] (3D, length unit m)
    air: Cylinder "5 m radius air domain" | r = air_radius; h = air_height
    slab: Block "Thick reinforced-concrete laboratory floor"
      size = {2*air_radius, 2*air_radius, floor_thickness}
      pos = {-air_radius, -air_radius, -floor_thickness}
    tankOuterEq: Cylinder "Equivalent PE tank" | r = tank_diam/2; h = tank_total_h
    tankCavityEq: Cylinder "圆柱体" | r = tank_diam/2-tank_wall; h = tank_total_h-tank_wall; pos = {0, 0, tank_wall}
    tankShellEq: Difference "Equivalent PE tank shell" | input = tankOuterEq; input2 = tankCavityEq
    waterEq: Cylinder "170 L conductive water"
      r = tank_diam/2-tank_wall
      h = water_volume/(pi*(tank_diam/2-tank_wall)^2)
      pos = {0, 0, tank_wall}
    pumpEq: Cylinder "Grounded pump and motor chassis"
      r = 0.13[m]
      h = 0.36
      pos = {0.84, 0, 0.18}
      axis = {0.36, 0, 0}
      axistype = cartesian
    vfdEq: Block "Grounded 3.7 kW VFD chassis" | size = {0.34, 0.20, 0.55}; pos = {2.34, -0.10, 0.52}
    supplyEq: Block "Grounded wall 380 V supply box" | size = {0.22, 0.16, 0.30}; pos = {2.72, -0.08, 0.72}
    motorCore1: Cylinder "VFD motor cable phase 1"
      r = 8[mm]
      h = 1.12
      pos = {2.3, -0.024, 0.4}
      axis = {-1.12, 0, 0}
      axistype = cartesian
    wallCore1: Cylinder "Wall supply phase 1"
      r = 8[mm]
      h = 0.03
      pos = {2.69, -0.024, 0.86}
      axis = {0.03, 0, 0}
      axistype = cartesian
    motorCore2: Cylinder "VFD motor cable phase 2"
      r = 8[mm]
      h = 1.12
      pos = {2.3, 0, 0.4}
      axis = {-1.12, 0, 0}
      axistype = cartesian
    wallCore2: Cylinder "Wall supply phase 2"
      r = 8[mm]
      h = 0.03
      pos = {2.69, 0, 0.86}
      axis = {0.03, 0, 0}
      axistype = cartesian
    motorCore3: Cylinder "VFD motor cable phase 3"
      r = 8[mm]
      h = 1.12
      pos = {2.3, 0.024, 0.4}
      axis = {-1.12, 0, 0}
      axistype = cartesian
    wallCore3: Cylinder "Wall supply phase 3"
      r = 8[mm]
      h = 0.03
      pos = {2.69, 0.024, 0.86}
      axis = {0.03, 0, 0}
      axistype = cartesian
    obs2: Point "Observation point 2 m" | p = {0, -2, 1}
    obs3: Point "Observation point 3 m" | p = {0, -3, 1}
    obs4: Point "Observation point 4 m" | p = {0, -4, 1}
    fin: Finalize "形成联合体"

Materials
  matAir: Common "Air" [comp2] on selection geom2_air_dom
    def: def "基本"
      electricconductivity = 1e-14[S/m]
      relpermittivity = 1.0006
  matConcrete: Common "Equivalent reinforced concrete" [comp2] on selection geom2_slab_dom
    def: def "基本"
      electricconductivity = sigma_concrete
      relpermittivity = epsr_concrete
  matPE: Common "PE tank" [comp2] on selection geom2_tankShellEq_dom
    def: def "基本"
      electricconductivity = 1e-15[S/m]
      relpermittivity = 2.3
  matWater: Common "Water at 500 uS/cm" [comp2] on selection geom2_waterEq_dom
    def: def "基本"
      electricconductivity = sigma_water
      relpermittivity = 80
  matPump: Common "Grounded pump metal" [comp2] on selection geom2_pumpEq_dom
    def: def "基本"
      electricconductivity = 5.8e7[S/m]
      relpermittivity = 1
  matVfd: Common "Grounded VFD metal" [comp2] on selection geom2_vfdEq_dom
    def: def "基本"
      electricconductivity = 5.8e7[S/m]
      relpermittivity = 1
  matSupply: Common "Grounded supply-box metal" [comp2] on selection geom2_supplyEq_dom
    def: def "基本"
      electricconductivity = 5.8e7[S/m]
      relpermittivity = 1
  matMotor1: Common "Motor cable copper phase 1" [comp2] on selection geom2_motorCore1_dom
    def: def "基本"
      electricconductivity = 5.8e7[S/m]
      relpermittivity = 1
  matWall1: Common "Wall supply copper phase 1" [comp2] on selection geom2_wallCore1_dom
    def: def "基本"
      electricconductivity = 5.8e7[S/m]
      relpermittivity = 1
  matMotor2: Common "Motor cable copper phase 2" [comp2] on selection geom2_motorCore2_dom
    def: def "基本"
      electricconductivity = 5.8e7[S/m]
      relpermittivity = 1
  matWall2: Common "Wall supply copper phase 2" [comp2] on selection geom2_wallCore2_dom
    def: def "基本"
      electricconductivity = 5.8e7[S/m]
      relpermittivity = 1
  matMotor3: Common "Motor cable copper phase 3" [comp2] on selection geom2_motorCore3_dom
    def: def "基本"
      electricconductivity = 5.8e7[S/m]
      relpermittivity = 1
  matWall3: Common "Wall supply copper phase 3" [comp2] on selection geom2_wallCore3_dom
    def: def "基本"
      electricconductivity = 5.8e7[S/m]
      relpermittivity = 1

Physics
  ec: ConductiveMedia "Electric currents - 30/50 Hz background" [geom2] on all domains
    dependent variable V
    cucns1: CurrentConservationSolid "固体中的电流守恒 1" (default)
    ein1: ElectricInsulation "电绝缘 1" (default)
    init1: init "初始值 1" (default)
    gndPump: Ground "Pump protective earth" on selection geom2_pumpEq_bnd
    gndVfd: Ground "VFD protective earth" on selection geom2_vfdEq_bnd
    gndSupply: Ground "Supply-box protective earth" on selection geom2_supplyEq_bnd
    potMotor1: ElectricPotential "VFD output phase 1" on selection geom2_motorCore1_bnd
      V0 = if(freq<100[Hz],V_phase*min(freq/f_base,1)*1,V_cm_spectrum)
    potWall1: ElectricPotential "Wall 50 Hz phase 1" on selection geom2_wallCore1_bnd
      V0 = if(abs(freq-50[Hz])<1[Hz],V_phase*1,0[V])
    potMotor2: ElectricPotential "VFD output phase 2" on selection geom2_motorCore2_bnd
      V0 = if(freq<100[Hz],V_phase*min(freq/f_base,1)*exp(-i*2*pi/3),V_cm_spectrum)
    potWall2: ElectricPotential "Wall 50 Hz phase 2" on selection geom2_wallCore2_bnd
      V0 = if(abs(freq-50[Hz])<1[Hz],V_phase*exp(-i*2*pi/3),0[V])
    potMotor3: ElectricPotential "VFD output phase 3" on selection geom2_motorCore3_bnd
      V0 = if(freq<100[Hz],V_phase*min(freq/f_base,1)*exp(i*2*pi/3),V_cm_spectrum)
    potWall3: ElectricPotential "Wall 50 Hz phase 3" on selection geom2_wallCore3_bnd
      V0 = if(abs(freq-50[Hz])<1[Hz],V_phase*exp(i*2*pi/3),0[V])

Mesh
  mesh2 "网格 2" [geom2]
    size: MeshSizeDefault "大小" | hmax = 0.65[m]; hmin = 6[mm]; hauto = 4
    ftet1: FreeTet "自由四面体网格 1" on remaining entities

Studies
  stdField "VFD fundamental and PWM common-mode spectrum"
    freq: Frequency "频域" | plist = 30 50 f_sw 2*f_sw 3*f_sw

Datasets
  cp2: CutPoint3D "Observation point 2 m" | pointx = 0; pointy = -2; pointz = 1
  cp3: CutPoint3D "Observation point 3 m" | pointx = 0; pointy = -3; pointz = 1
  cp4: CutPoint3D "Observation point 4 m" | pointx = 0; pointy = -4; pointz = 1

Derived values
  eval2: EvalPoint "Electric field at 2 m" | data = cp2; expr = {V, ec.Ex, ec.Ey, ec.Ez, ec.normE, E_sensor, V_MEMS}
  eval3: EvalPoint "Electric field at 3 m" | data = cp3; expr = {V, ec.Ex, ec.Ey, ec.Ez, ec.normE, E_sensor, V_MEMS}
  eval4: EvalPoint "Electric field at 4 m" | data = cp4; expr = {V, ec.Ex, ec.Ey, ec.Ez, ec.normE, E_sensor, V_MEMS}